// SBML level 3 version 1

model toggle_model()

  // Compartments:
  compartment cell = 1;  // GO:0005623

  // Species:
  // lacI inhibitor
  substanceOnly species PX in cell = 0; PX is "LacI protein";  // uniprot:P03023
  // Tet repressor protein
  substanceOnly species PY in cell = 0; PY is "TetR protein";  // uniprot:P04483

  // Parameters:
  // Average number of proteins per transcript
  eff = 20; eff is "translation efficiency";
  // Hill coefficient
  n = 2;
  // Number of repressor molecules per cell giving half maximal repression, in monomers per cell
  KM = 40;
  tau_mRNA = 2; tau_mRNA is "mRNA half life";
  tau_prot = 10; tau_prot is "protein half life";
  var t_ave; t_ave is "average mRNA life time";
  // Transcrition from free promotor in transcripts per second and promotor
  ps_a = 0.5; ps_a is "tps_active";
  // Transcrition from fully repressed promotor in transcripts per second and promotor
  ps_0 = 0.0005; ps_0 is "tps_repr";

  // Assignment rules:
  t_ave := tau_mRNA/ln(2);
  beta := tau_mRNA/tau_prot;
  k_tl := eff/t_ave;
  a_tr := (ps_a - ps_0)*60;
  a0_tr := ps_0*60;
  kd_prot := ln(2)/tau_prot;
  kd_mRNA := ln(2)/tau_mRNA;
  alpha := a_tr*eff*tau_prot/(ln(2)*KM);
  alpha0 := a0_tr*eff*tau_prot/(ln(2)*KM);

  // Reactions:
  degradation_of_LacI_transcripts: X => ; kd_mRNA*X;  // isVersionOf GO:0006402
  degradation_of_TetR_transcripts: Y => ; kd_mRNA*Y;  // isVersionOf GO:0006402
  translation_of_LacI: => PX; k_tl*X;  // modifiers: X; isVersionOf GO:0006412
  translation_of_TetR: => PY; k_tl*Y;  // modifiers: Y; isVersionOf GO:0006412
  degradation_of_LacI: PX => ; kd_prot*PX;  // isVersionOf GO:0030163
  degradation_of_TetR: PY => ; kd_prot*PY;  // isVersionOf GO:0030163
  transcription_of_LacI: => X; a0_tr + a_tr*KM^n/(KM^n + PY^n);  // modifiers: PY; isVersionOf GO:0006351
  transcription_of_TetR: => Y; a0_tr + a_tr*KM^n/(KM^n + PX^n);  // modifiers: PX; isVersionOf GO:0006351

  // Unit definitions:
  unit volume = 1e-15 litre; volume is "cubic microns";
  unit substance = item; substance is "item";
  unit time = 60 second; time is "minute";
end
